<neuroml xmlns="http://www.neuroml.org/schema/neuroml2"  xmlns:xs="http://www.w3.org/2001/XMLSchema" xmlns:xsi="http://www.w3.org/2001/XMLSchema-instance" xsi:schemaLocation="http://www.neuroml.org/schema/neuroml2 https://raw.github.com/NeuroML/NeuroML2/development/Schemas/NeuroML2/NeuroML_v2.1.xsd" id="HNN_Synapses">
    <expTwoSynapse id="L2Pyr_AMPA" gbase="1uS" erev="0.0mV" tauDecay="5.0ms" tauRise="0.5ms"/>
    <expTwoSynapse id="L2Pyr_NMDA" gbase="1uS" erev="0.0mV" tauDecay="20.0ms" tauRise="1.0ms"/>
    <expTwoSynapse id="L2Pyr_GABAA" gbase="1uS" erev="-80.0mV" tauDecay="5.0ms" tauRise="0.5ms"/>
    <expTwoSynapse id="L2Pyr_GABAB" gbase="1uS" erev="-80.0mV" tauDecay="20.0ms" tauRise="1.0ms"/>
    <expTwoSynapse id="L5Pyr_AMPA" gbase="1uS" erev="0.0mV" tauDecay="5.0ms" tauRise="0.5ms"/>
    <expTwoSynapse id="L5Pyr_NMDA" gbase="1uS" erev="0.0mV" tauDecay="20.0ms" tauRise="1.0ms"/>
    <expTwoSynapse id="L5Pyr_GABAA" gbase="1uS" erev="-80.0mV" tauDecay="5.0ms" tauRise="0.5ms"/>
    <expTwoSynapse id="L5Pyr_GABAB" gbase="1uS" erev="-80.0mV" tauDecay="20.0ms" tauRise="1.0ms"/>
    <expTwoSynapse id="AMPA" gbase="1uS" erev="0mV" tauDecay="5.0ms" tauRise="0.5ms"/>
    <expTwoSynapse id="NMDA" gbase="1uS" erev="0mV" tauDecay="20ms" tauRise="1ms"/>
    <expTwoSynapse id="GABAA" gbase="1uS" erev="-80mV" tauDecay="5ms" tauRise="0.5ms"/>
    <expTwoSynapse id="GABAB" gbase="1uS" erev="-80mV" tauDecay="20ms" tauRise="1ms"/>
</neuroml>
