<neuroml xmlns="http://www.neuroml.org/schema/neuroml2"  xmlns:xs="http://www.w3.org/2001/XMLSchema" xmlns:xsi="http://www.w3.org/2001/XMLSchema-instance" xsi:schemaLocation="http://www.neuroml.org/schema/neuroml2 https://raw.github.com/NeuroML/NeuroML2/development/Schemas/NeuroML2/NeuroML_v2.1.xsd" id="HNN">

    <ionChannelHH id="leak_hh" type="ionChannelPassive" conductance="10pS">
        <notes>Single ion channel in NeuroML2 format: passive channel providing a leak conductance </notes>
    </ionChannelHH>
    <ionChannelHH id="na_hh" species="na" conductance="10pS">
        <notes>Single ion channel in NeuroML2 format: standard Sodium channel from the Hodgkin Huxley model</notes>
        <gateHHrates id="m" instances="3">
            <forwardRate type="HHExpLinearRate" rate="1per_ms" midpoint="-40mV" scale="10mV"/>
            <reverseRate type="HHExpRate" rate="4per_ms" midpoint="-65mV" scale="-18mV"/>
        </gateHHrates>
        <gateHHrates id="h" instances="1">
            <forwardRate type="HHExpRate" rate="0.07per_ms" midpoint="-65mV" scale="-20mV"/>
            <reverseRate type="HHSigmoidRate" rate="1per_ms" midpoint="-35mV" scale="10mV"/>
        </gateHHrates>
    </ionChannelHH>
    <ionChannelHH id="k_hh" species="k" conductance="10pS">
        <notes>Single ion channel in NeuroML2 format: standard Potassium channel from the Hodgkin Huxley model</notes>
        <gateHHrates id="n" instances="4">
            <forwardRate type="HHExpLinearRate" rate="0.1per_ms" midpoint="-55mV" scale="10mV"/>
            <reverseRate type="HHExpRate" rate="0.125per_ms" midpoint="-65mV" scale="-80mV"/>
        </gateHHrates>
    </ionChannelHH>

</neuroml>
